x := [alt_estimate; speed_estimate] → [alt_estimate; speed_estimate]  # - вектор состояний
F := [1, dt; 0, 1] → [1, dt; 0, 1]  # - матрица перехода состояний
w_state_noise := [1; 1]  # - вектор шумов состояния
u_control_vector := [acc_Z_axis; 0] → [acc_Z_axis; 0]  # - управляющее воздействие
B := [dt^2/2, 0; dt, 0] → [dt^2/2, 0; dt, 0]  # - матрица перехода управляющего воздействия в вектор состояний
P := [P_00, P_01; P_10, P_11] → [P_00, P_01; P_10, P_11]  # - матрица ковариаций (инициализировать как диоганальную матрицу)
Q := [Q_00, Q_01; Q_10, Q_11] → [Q_00, Q_01; Q_10, Q_11]  # - матрица шума акселерометра
R := [R_00; R_10] → [R_00; R_10]  # - матрица шума барометра
e := Q[0, 2]  # error: Недопустимый индекс массива. Индекс должен быть целым числом не менее ORIGIN и не более номера последнего элемента.
H := [1, 0]  # - матрица перехода вектора состояний в область измерений
z := [alt_baro; speed_baro] → [alt_baro; speed_baro]  # disabled
test := H*x → [alt_estimate; speed_estimate]  # disabled
z - H*x → [alt_baro - alt_estimate; speed_baro - speed_estimate]  # disabled
test := H*z → [z, 0; 0, z]  # disabled
z := alt_baro → alt_baro
# Обновление вектора состояний
x := F*x + B*u_control_vector → [acc_Z_axis*dt^2/2 + speed_estimate*dt + alt_estimate; speed_estimate + acc_Z_axis*dt]
x := [alt_estimate; speed_estimate] → [alt_estimate; speed_estimate]
# Обновление матрицы ковариаций
P := F*P*transpose(F) + Q → [
    P_00 + Q_00 + dt*(P_01 + P_11*dt) + P_10*dt, P_01 + Q_01 + P_11*dt;
    P_10 + Q_10 + P_11*dt, P_11 + Q_11
]
P := [P_00, P_01; P_10, P_11] → [P_00, P_01; P_10, P_11]
# Обновление коэффициентов усиления фильтра
K := F*P*transpose(H)*(H*P*transpose(H))^-1 → [(P_00 + P_10*dt)/P_00; P_10/P_00]
K := P*transpose(H)*(H*P*transpose(H))^-1 → [1; P_10/P_00]  # - использовать эту матрицу ???
K := [Alt_KalmanGain; Speed_KalmanGain] → [Alt_KalmanGain; Speed_KalmanGain]
# Обновление оценки с помощью измерений
x := x + K*(z - H*x) → [
    alt_estimate + Alt_KalmanGain*(alt_baro - alt_estimate);
    speed_estimate + Speed_KalmanGain*(alt_baro - alt_estimate)
]
# Обновление матрицы ковариаций
I := [1, 0; 0, 1] → [1, 0; 0, 1]
P := (I - K*H)*P → [
    -(P_00*(Alt_KalmanGain - 1)), -(P_01*(Alt_KalmanGain - 1));
    P_10 - P_00*Speed_KalmanGain, P_11 - P_01*Speed_KalmanGain
]
P := P - (K*H*P) → [
    P_00*Alt_KalmanGain*(Alt_KalmanGain - 1) - P_00*(Alt_KalmanGain - 1), P_01*Alt_KalmanGain*(Alt_KalmanGain - 1) - P_01*(Alt_KalmanGain - 1);
    P_10 - P_00*Speed_KalmanGain + P_00*Speed_KalmanGain*(Alt_KalmanGain - 1), P_11 - P_01*Speed_KalmanGain + P_01*Speed_KalmanGain*(Alt_KalmanGain - 1)
]
