x := [alt_estimate; speed_estimate] → [alt_estimate; speed_estimate]  # - вектор состояний
F := [1, dt; 0, 1] → [1, dt; 0, 1]  # - матрица перехода состояний
w_state_noise := [1; 1]  # - вектор шумов состояния
u_control_vector := [acc_Z_axis; 0] → [acc_Z_axis; 0]  # - управляющее воздействие
B := [dt^2/2, 0; dt, 0] → [dt^2/2, 0; dt, 0]  # - матрица перехода управляющего воздействия в вектор состояний
P_full_update_prev := [P_full_update_prev00, P_full_update_prev01; P_full_update_prev10, P_full_update_prev11] → [P_full_update_prev00, P_full_update_prev01; P_full_update_prev10, P_full_update_prev11]
# - матрица ковариаций (инициализировать как диоганальную матрицу)
P := [
    P_full_update_prev[0, 0], P_full_update_prev[0, 1];
    P_full_update_prev[1, 0], P_full_update_prev[1, 1]
] → [P_full_update_prev00, P_full_update_prev01; P_full_update_prev10, P_full_update_prev11]
Q := [Q_00, Q_01; Q_10, Q_11] → [Q_00, Q_01; Q_10, Q_11]  # - матрица шума акселерометра
R := [R_00; R_10] → [R_00; R_10]  # - матрица шума барометра
H := [1, 0]  # - матрица перехода вектора состояний в область измерений
z := [alt_baro; speed_baro] → [alt_baro; speed_baro]  # disabled
test := H*x → [alt_estimate; speed_estimate]  # disabled
z - H*x → [alt_baro - alt_estimate; speed_baro - speed_estimate]  # disabled
test := H*z → [z, 0; 0, z]  # disabled
z := alt_baro → alt_baro
# Обновление вектора состояний
x_half_update := F*x + B*u_control_vector → [acc_Z_axis*dt^2/2 + speed_estimate*dt + alt_estimate; speed_estimate + acc_Z_axis*dt]
x_half_update := [alt_half_update_estimate; speed_half_update_estimate] → [alt_half_update_estimate; speed_half_update_estimate]
# Обновление матрицы ковариаций
P_full_update_prev := [P_full_update_prev00, P_full_update_prev01; P_full_update_prev10, P_full_update_prev11] → [P_full_update_prev00, P_full_update_prev01; P_full_update_prev10, P_full_update_prev11]
P_half_update := F*P_full_update_prev*transpose(F) + Q → [
    Q_00 + P_full_update_prev00 + dt*(P_full_update_prev01 + P_full_update_prev11*dt) + P_full_update_prev10*dt, Q_01 + P_full_update_prev01 + P_full_update_prev11*dt;
    Q_10 + P_full_update_prev10 + P_full_update_prev11*dt, Q_11 + P_full_update_prev11
]
P_half_update := [P_half_update00, P_half_update01; P_half_update10, P_half_update11] → [P_half_update00, P_half_update01; P_half_update10, P_half_update11]
# Обновление коэффициентов усиления фильтра
K := F*P_half_update*transpose(H)*(H*P_half_update*transpose(H))^-1 → [(P_half_update00 + P_half_update10*dt)/P_half_update00; P_half_update10/P_half_update00]
K := P_half_update*transpose(H)*(H*P_half_update*transpose(H))^-1 → [1; P_half_update10/P_half_update00]  # - использовать эту матрицу ???
K := [K_00; K_10] → [K_00; K_10]
# Обновление оценки с помощью измерений
x_full_update := x_half_update + K*(z - H*x_half_update) → [
    alt_half_update_estimate + K_00*(alt_baro - alt_half_update_estimate);
    speed_half_update_estimate + K_10*(alt_baro - alt_half_update_estimate)
]
x_full_update := [alt_full_update_estimate; speed_full_update_estimate] → [alt_full_update_estimate; speed_full_update_estimate]
# Обновление матрицы ковариаций
# P_full_update := (I - K*H)*P_half_update - формула для обновления матрицы ковариаций
I := [1, 0; 0, 1] → [1, 0; 0, 1]  # - единичиная матрица
first := I*P_half_update → [P_half_update00, P_half_update01; P_half_update10, P_half_update11]
second := K*H*P_half_update → [K_00*P_half_update00, K_00*P_half_update01; K_10*P_half_update00, K_10*P_half_update01]
P_full_update := first - second → [
    P_half_update00 - K_00*P_half_update00, P_half_update01 - K_00*P_half_update01;
    P_half_update10 - K_10*P_half_update00, P_half_update11 - K_10*P_half_update01
]
P_full_update := (I - K*H)*P_half_update → [
    -(P_half_update00*(K_00 - 1)), -(P_half_update01*(K_00 - 1));
    P_half_update10 - K_10*P_half_update00, P_half_update11 - K_10*P_half_update01
]
